// SBML level 3 version 2

model facilitated_ca_diffusion()
  // Test two-dimensional compartments
  // Based on:
  // The Systems Biology Markup Language (SBML):
  // Language Specification for Level 3 Version 2 Core
  // Chapter 7.12: Example involving two-dimensional compartments
  // model units - substance: substance, time: second, volume: litre, area: area, extent: substance

  // Compartments:
  compartment Extracellular = 1;
  compartment PlasmaMembrane = 1;  // 2-D
  compartment Cytosol = 1;

  // Species:
  species CaBPB_C in Cytosol = 47.17;
  species B_C in Cytosol = 396.04;
  species CaB_C in Cytosol = 3.96;
  species Ca_C in Cytosol = 0.1;
  species Ca_EC in Extracellular = 1000;
  species CaCh_PM in PlasmaMembrane = 1;
  species CaPump_PM in PlasmaMembrane = 1;
  species CaBP_C in Cytosol = 202.83;

  // Reactions:
  // (((Kf_CalciumCalbindin_BoundCytosol * CaBP_C) * Ca_C) - (Kr_CalciumCalbindin_BoundCytosol * CaBPB_C))
  CalciumCalbindin_gt_BoundCytosol: CaBP_C + Ca_C -> CaBPB_C; Cytosol*(Kf_CalciumCalbindin_BoundCytosol*CaBP_C*Ca_C - Kr_CalciumCalbindin_BoundCytosol*CaBPB_C);
    Kf_CalciumCalbindin_BoundCytosol = 20 litre_per_mole_per_second; Kr_CalciumCalbindin_BoundCytosol = 8.6 per_second;
  // (((Kf_CalciumBuffer_BoundCytosol * Ca_C) * B_C) - (Kr_CalciumBuffer_BoundCytosol * CaB_C))
  CalciumBuffer_gt_BoundCytosol: Ca_C + B_C -> CaB_C; Cytosol*(Kf_CalciumBuffer_BoundCytosol*Ca_C*B_C - Kr_CalciumBuffer_BoundCytosol*CaB_C);
    Kf_CalciumBuffer_BoundCytosol = 0.1 litre_per_mole_per_second; Kr_CalciumBuffer_BoundCytosol = 1 per_second;
  // ((Vmax * kP * ((Ca_C - Ca_Rest) / (Ca_C + kP)) / (Ca_Rest + kP)) * CaPump_PM)
  Ca_Pump: Ca_C -> Ca_EC; PlasmaMembrane*(Vmax*kP*CaPump_PM*(Ca_C - Ca_Rest)/((Ca_C + kP)*(Ca_Rest + kP)));  // modifiers: CaPump_PM
    Vmax = 4000 per_second; kP = 0.25 subs_per_vol; Ca_Rest = 0.1 subs_per_vol;
  // (J0 * Kc * (Ca_EC - Ca_C) / (Kc + Ca_C) * CaCh_PM)
  Ca_channel: Ca_EC -> Ca_C; PlasmaMembrane*(CaCh_PM*J0*Kc*(Ca_EC - Ca_C)/(Kc + Ca_C));  // modifiers: CaCh_PM
    J0 = 0.014 litre_per_mole_per_second; Kc = 0.5 subs_per_vol;

  // Unit definitions:
  unit substance = 1e-6 mole;
  unit area = (1e-6 metre)^2;
  unit per_second = 1 / second;
  unit litre_per_mole_per_second = litre / (1e-6 mole * second);
  unit subs_per_vol = 1e-6 mole / litre;
end
