// SBML level 3 version 2

function MM_1R(kcat, Enz, R, KmR)
  kcat*Enz*R/KmR/(1 + R/KmR);
end

function MM_2R(kcat, Enz, R1, R2, KmR1, KmR2)
  kcat*Enz*R1/KmR1*R2/KmR2/((1 + R1/KmR1)*(1 + R2/KmR2));
end

function MM_1R1P_rev(kf, kr, Enz, R, P, KmR, KmP)
  Enz*(kf*R/KmR - kr*P/KmP)/((1 + R/KmR)*(1 + P/KmP));
end

model Shikimate_pwy()
  // Test XML annotations
  // Example of parts of shikimate pathway for E. coli K-12 MG1655 based on Ecocyc database, using Gibbs energies for transactions based on eQuilibrator at pH 7.5, pmg 3.0, ionic strength of 0.25 mM
  // Extending some iML1555 model elements with xml-annotation on species and reaction level:
  // using sample namespaces from http://www.hhu.de/ccb/bgm/ns
  // isDescribedBy pubmed:29020004 pubmed:22064852 pubmed:27899573
  // model units - substance: substance, time: time, volume: litre, extent: substance

  // Compartments:
  compartment cytosol = 1e-6 litre;  // bigg.compartment:c
  compartment env = 1 litre; env is "extracellular space";
  compartment periplasm = 1e-7 litre;  // bigg.compartment:p

  // Species:
  species M_e4p_c in cytosol = 1; M_e4p_c is "D-Erythrose 4-phosphate";  // substance in mmol; bigg.metabolite:e4p META:ERYTHROSE-4P CHEBI:12921 CHEBI:16897
  species M_2dda7p_c in cytosol = 1; M_2dda7p_c is "2-Dehydro-3-deoxy-D-arabino-heptonate 7-phosphate";  // substance in mmol; bigg.metabolite:2dda7p META:3-DEOXY-D-ARABINO-HEPTULOSONATE-7-P CHEBI:1053 CHEBI:11544
  species M_3dhq_c in cytosol = 1; M_3dhq_c is "3-Dehydroquinate";  // substance in mmol; bigg.metabolite:3dhq META:DEHYDROQUINATE CHEBI:11781 CHEBI:12122
  species M_3dhsk_c in cytosol = 1; M_3dhsk_c is "3-Dehydroshikimate";  // substance in mmol; bigg.metabolite:3dhsk META:3-DEHYDRO-SHIKIMATE CHEBI:11782 CHEBI:12123
  species M_pep_c in cytosol = 1; M_pep_c is "Phosphoenolpyruvate";  // substance in mmol; bigg.metabolite:pep META:PHOSPHO-ENOL-PYRUVATE CHEBI:14812 CHEBI:18021
  species M_nadph_c in cytosol = 1; M_nadph_c is "Nicotinamide adenine dinucleotide phosphate - reduced";  // substance in mmol; bigg.metabolite:nadph META:NADPH CHEBI:13399 CHEBI:13400
  species M_skm_c in cytosol = 1; M_skm_c is "Shikimate";  // substance in mmol; bigg.metabolite:skm META:SHIKIMATE CHEBI:15083 CHEBI:16119
  species M_h2o_c in cytosol = 1; M_h2o_c is "H2O";  // substance in mmol; bigg.metabolite:h2o META:CPD-15815 META:HYDROXYL-GROUP META:OH
  species M_pi_c in cytosol = 1; M_pi_c is "Phosphate";  // substance in mmol; bigg.metabolite:pi META:CPD-16459 META:PHOSPHATE-GROUP META:Pi
  species M_h_c in cytosol = 1; M_h_c is "H+";  // substance in mmol; bigg.metabolite:h META:PROTON CHEBI:10744 CHEBI:13357
  species M_nadp_c in cytosol = 1; M_nadp_c is "Nicotinamide adenine dinucleotide phosphate";  // substance in mmol; bigg.metabolite:nadp META:NADP CHEBI:13397 CHEBI:13398
  species aroF in cytosol = 0.01; aroF is "3-deoxy-D-arabino-heptulosonate 7-phosphate synthetase";  // substance in mmol
  species aroH in cytosol = 0.01; aroH is "3-deoxy-D-arabino-heptulosonate 7-phosphate synthetase";  // substance in mmol
  species aroG in cytosol = 0.01; aroG is "3-deoxy-D-arabino-heptulosonate 7-phosphate synthetase";  // substance in mmol
  species aroB in cytosol = 0.01; aroB is "3-dehydroquinate synthase";  // substance in mmol
  species aroD in cytosol = 0.01; aroD is "3-dehydroquinate dehydratase, irreversible";  // substance in mmol
  species aroE in cytosol = 0.01; aroE is "shikimate dehydrogenase";  // substance in mmol

  // Parameters:
  fbc_default_lb = -1000 mmol_per_gDW_per_hr;
  fbc_default_ub = 1000 mmol_per_gDW_per_hr;
  fbc_0_bound = 0 mmol_per_gDW_per_hr;

  // Reactions:
  R_DDPA_1: M_e4p_c + M_h2o_c + M_pep_c => M_2dda7p_c + M_pi_c; cytosol*MM_2R(R_DDPA_1_kcat, aroF, M_e4p_c, M_pep_c, R_DDPA_1_KmR1, R_DDPA_1_KmR2); R_DDPA_1 is "3-deoxy-D-arabino-heptulosonate 7-phosphate synthetase";  // modifiers: aroF; bigg.reaction:DDPA META:DAHPSYN-RXN ec-code:2.5.1.54 kegg.reaction:R01826
    R_DDPA_1_kcat = 120 per_s; R_DDPA_1_KmR1 = 0.0965 mM; R_DDPA_1_KmR2 = 0.0058 mM;
  R_DDPA_2: M_e4p_c + M_h2o_c + M_pep_c => M_2dda7p_c + M_pi_c; cytosol*MM_2R(R_DDPA_2_kcat, aroH, M_e4p_c, M_pep_c, R_DDPA_2_KmR1, R_DDPA_2_KmR2); R_DDPA_2 is "3-deoxy-D-arabino-heptulosonate 7-phosphate synthetase";  // modifiers: aroH; bigg.reaction:DDPA META:DAHPSYN-RXN ec-code:2.5.1.54 kegg.reaction:R01826
    R_DDPA_2_kcat = 20.6 per_s; R_DDPA_2_KmR1 = 0.076 mM; R_DDPA_2_KmR2 = 0.076 mM;
  R_DDPA_3: M_e4p_c + M_h2o_c + M_pep_c => M_2dda7p_c + M_pi_c; cytosol*MM_2R(R_DDPA_3_kcat, aroG, M_e4p_c, M_pep_c, R_DDPA_3_KmR1, R_DDPA_3_KmR2); R_DDPA_3 is "3-deoxy-D-arabino-heptulosonate 7-phosphate synthetase";  // modifiers: aroG; bigg.reaction:DDPA META:DAHPSYN-RXN ec-code:2.5.1.54 kegg.reaction:R01826
    R_DDPA_3_kcat = 62.3 per_s; R_DDPA_3_KmR1 = 0.25 mM; R_DDPA_3_KmR2 = 0.035 mM;
  R_DHQS: M_2dda7p_c => M_3dhq_c + M_pi_c; cytosol*MM_1R(R_DHQS_kcat, aroB, M_2dda7p_c, R_DHQS_Km); R_DHQS is "3-dehydroquinate synthase";  // modifiers: aroB; bigg.reaction:DHQS META:3-DEHYDROQUINATE-SYNTHASE-RXN ec-code:4.2.3.4 kegg.reaction:R03083
    R_DHQS_kcat = 16 per_s; R_DHQS_Km = 0.0965 mM;
  R_DHQTi: M_3dhq_c => M_3dhsk_c + M_h2o_c; cytosol*MM_1R(R_DHQTi_kcat, aroD, M_3dhq_c, R_DHQTi_Km); R_DHQTi is "3-dehydroquinate dehydratase, irreversible";  // modifiers: aroD; bigg.reaction:DHQTi META:3-DEHYDROQUINATE-DEHYDRATASE-RXN ec-code:4.2.1.10 kegg.reaction:R03084
    R_DHQTi_kcat = 29.5 per_s; R_DHQTi_Km = 0.076 mM;
  R_SHK3Dr: M_3dhsk_c + M_h_c + M_nadph_c -> M_nadp_c + M_skm_c; cytosol*MM_1R1P_rev(kf, kr, aroE, M_3dhsk_c, M_skm_c, KmR, KmP); R_SHK3Dr is "Shikimate dehydrogenase";  // modifiers: aroE; bigg.reaction:SHK3Dr META:SHIKIMATE-5-DEHYDROGENASE-RXN ec-code:1.1.1.25 ec-code:1.1.1.282
    kf = 186 per_s; kr = 190 per_s; KmR = 0.11 mM; KmP = 0.13 mM;

  // Unit definitions:
  unit time = second;
  unit substance = 1e-3 mole;
  unit per_s = 1 / second;
  unit M = mole / litre;
  unit mmol_per_gDW_per_hr = 1e-3 mole / (gram * 3600 second); mmol_per_gDW_per_hr is "Millimoles per gram (dry weight) per hour";
  unit mM = 1e-3 mole / litre;
  unit mmol = 1e-3 mole;
end
