// SBML level 3 version 2

model conversionFactor2()
  // Test conversion factor attribute
  // Based on:
  // The Systems Biology Markup Language (SBML):
  // Language Specification for Level 3 Version 2 Core
  // Chapter 7.3, An alternative formulation of the conversionFactor example
  // model units - time: second, extent: mole
  // conversionFactor convertToMilliMole

  // Compartments:
  compartment comp = 1e-14 litre;

  // Species:
  species ES in comp = 0;  // substance in millimole
  species P in comp = 0;  // substance in gram; conversionFactor convertToGram
  species S in comp = 1e-17/comp;  // substance in millimole
  species E in comp = 5e-18/comp;  // substance in millimole

  // Parameters:
  convertToMilliMole = 1000 millimole_per_mole;
  convertToGram = 180 gram_per_mole;
  c_e = 1e-3 mole_per_millimole;
  c_s = 1e-3 mole_per_millimole;
  c_es = 1e-3 mole_per_millimole;

  // Reactions:
  veq: E + S -> ES; comp*(kon*E*c_e*S*c_s - koff*ES*c_es);
    kon = 1000000 litre_per_mole_second; koff = 0.2 per_second;
  vcat: ES => E + P; comp*kcat*ES*c_es;
    kcat = 0.1 per_second;

  // Unit definitions:
  unit per_second = 1 / second;
  unit litre_per_mole_second = litre / (mole * second);
  unit millimole = 1e-3 mole;
  unit gram_per_mole = gram / mole;
  unit mole_per_millimole = mole / (1e-3 mole);
  unit millimole_per_mole = 1e-3 mole / mole;
end
