// SBML level 3 version 2

model delay()
  // Test delay functions
  // Based on:
  // The Systems Biology Markup Language (SBML):
  // Language Specification for Level 3 Version 2 Core
  // Chapter 7.10: Example involving delay functions
  // model units - substance: mole, time: second, volume: litre, extent: mole

  // Compartments:
  compartment cell = 1;

  // Species:
  species P in cell = 0;

  // Parameters:
  tau = 1 second;
  m = 0.5 dimensionless;
  q = 1 dimensionless;
  delta_t = 1 second;

  // Rate rules:
  P' = (1 conc_sq/(1 conc + m*delay(P, delta_t)^q) - P)/tau;

  // Unit definitions:
  unit conc = mole / litre;
  unit conc_sq = mole^2 / litre^2;
end
