// SBML level 3 version 2

model stochasicSim()
  // Test discrete stochastic simulation model
  // Based on:
  // The Systems Biology Markup Language (SBML):
  // Language Specification for Level 3 Version 2 Core
  // Chapter 7.4: Example of a discrete version of a simple dimerization reaction
  // model units - substance: item, time: second, volume: litre, extent: item

  // Compartments:
  compartment Cell = 1e-15;

  // Species:
  substanceOnly species P in Cell = 301;
  substanceOnly species P2 in Cell = 0;

  // Reactions:
  Dimerization: 2 P => P2; c1*P*(P - (1 item))/2;
    c1 = 0.00166 per_item_per_second;
  Dissociation: P2 => 2 P; c2*P;
    c2 = 0.2 per_second;

  // Unit definitions:
  unit per_second = 1 / second;
  unit per_item_per_second = 1 / (item * second);
end
