// SBML level 3 version 2

function MM_enzyme(size, k, enz, subs, Km)
  size*k*enz*subs/(Km + subs);
end

model Model_1()
  // Reaction on membrane
  // Test reaction in membrane
  // Based on:
  // The Systems Biology Markup Language (SBML):
  // Language Specification for Level 3 Version 2 Core
  // Chapter 7.13: Example of a reaction located at a membrane
  // model units - substance: micromole, time: minute, extent: micromole

  // Compartments:
  compartment cyt = 1e-15 litre; cyt is "Cytosol";
  compartment mem = 1 sqrmicrometre; mem is "Membrane";  // 2-D

  // Species:
  species substrate in cyt = 1;
  species product in cyt = 1;
  species enzyme in mem = 1;

  // Reactions:
  Reaction: substrate => product; MM_enzyme(mem, k, enzyme, substrate, Km);  // modifiers: enzyme
    k = 0.1 per_minute; Km = 0.1 micromole_per_l;

  // Unit definitions:
  unit minute = 60 second;
  unit per_minute = 1 / (60 second);
  unit micromole = 1e-6 mole;
  unit micromole_per_l = 1e-6 mole / litre;
  unit sqrmicrometre = (1e-6 metre)^2;
end
