// SBML level 3 version 2

model LotkaVolterra_tranport()
  // Test multi-compartment model
  // Based on:
  // The Systems Biology Markup Language (SBML):
  // Language Specification for Level 3 Version 2 Core
  // Chapter 7.8, Example of translation from a multi-compartmental model to ODEs
  // model units - substance: mole, time: second, volume: litre, extent: mole

  // Compartments:
  compartment cytoplasm = 5;
  compartment nucleus = 1;

  // Species:
  species $X in nucleus = 1/nucleus;
  species Y1n in nucleus = 1/nucleus;
  species Y1c in cytoplasm = 0;
  species Y2 in cytoplasm = 1/cytoplasm;

  // Parameters:
  k1 = 2500 litre_per_mole_per_second;
  k2 = 2500 litre_per_mole_per_second;
  KT = 25000 per_second;
  k3 = 2500 per_second;

  // Reactions:
  production: $X + Y1n => Y1n + Y1n; nucleus*k1*X*Y1n;
  transport: Y1n -> Y1c; cytoplasm*KT*(Y1n - Y1c);
  transformation: Y1c + Y2 => 2 Y2; cytoplasm*k2*Y1c*Y2;
  degradation: Y2 => ; cytoplasm*k3*Y2;

  // Unit definitions:
  unit per_second = 1 / second;
  unit litre_per_mole_per_second = litre / (mole * second);
end
