// SBML level 3 version 2

model PersistentEvent()
  // Test event with non-persistent trigger
  // Based on:
  // The Systems Biology Markup Language (SBML):
  // Language Specification for Level 3 Version 2 Core
  // Chapter 7.14: Example using an event with a non-persistent trigger and a delay
  // model units - time: second, extent: mole

  // Compartments:
  compartment compartment = 1 litre;

  // Species:
  species $d in compartment = 0;  // substance in mole
  species a in compartment = 2;  // substance in mole
  species b in compartment = 0;  // substance in mole
  species c in compartment = 0;  // substance in mole
  species e in compartment;  // substance in mole

  // Parameters:
  k1 = 0.2 l_per_s;

  // Assignment rules:
  e := 1 mol_per_l;

  // Reactions:
  _J0: a => $d; k1*a;

  // Events:
  at (3 second) after ((a <= 1.001 mol_per_l) && (a >= 0.999 mol_per_l)), persistent=false: c = 6 mol_per_l;

  // Unit definitions:
  unit mol_per_l = mole / litre;
  unit l_per_s = litre / second;
end
