// SBML level 3 version 2

model simpleNetwork()
  // Test simple SBML model
  // Based on:
  // The Systems Biology Markup Language (SBML):
  // Language Specification for Level 3 Version 2 Core
  // Chapter 7.1, A simple example application of SBML
  // model units - time: second, extent: mole

  // Compartments:
  compartment comp = 1e-14 litre;

  // Species:
  species E in comp = 5e-21/comp;  // substance in mole
  species S in comp = 1e-20/comp;  // substance in mole
  species P in comp = 0;  // substance in mole
  species ES in comp = 0;  // substance in mole

  // Reactions:
  veq: E + S -> ES; comp*(kon*E*S - koff*ES);
    kon = 1000000 litre_per_mole_second; koff = 0.2 per_second;
  vcat: ES => E + P; comp*kcat*ES;
    kcat = 0.1 per_second;

  // Unit definitions:
  unit per_second = 1 / second;
  unit litre_per_mole_second = litre / (mole * second);
end
